// SBML level 2 version 3

model model()

  // Compartments:
  compartment cell = 1;

  // Species:
  species IGF1_rec in cell = 59635.288/cell; IGF1_rec is "IGF1(rec)";
  species Ins_rec in cell = 5.0422095e-36/cell; Ins_rec is "Ins(rec)";
  species IGF1R_int_N_lig_phos_U in cell = 6.4549916e-5/cell; IGF1R_int_N_lig_phos_U is "IGF1R(int~N,lig,phos~U)";
  species InsR_int_N_lig_phos_U in cell = 25000/cell; InsR_int_N_lig_phos_U is "InsR(int~N,lig,phos~U)";
  species IRS_inh_N_phos_U in cell = 187.99966/cell; IRS_inh_N_phos_U is "IRS(inh~N,phos~U)";
  species SOS_act_N_inh_N in cell = 0.0015165783/cell; SOS_act_N_inh_N is "SOS(act~N,inh~N)";
  species Ras_gtp_N in cell = 161550.9/cell; Ras_gtp_N is "Ras(gtp~N)";
  species Raf_inh_N_phos_U in cell = 5747.7285/cell; Raf_inh_N_phos_U is "Raf(inh~N,phos~U)";
  species MEK_inh_N_phos_U in cell = 2.3563565e-8/cell; MEK_inh_N_phos_U is "MEK(inh~N,phos~U)";
  species PI3K_act_N in cell = 50411.857/cell; PI3K_act_N is "PI3K(act~N)";
  species PDK1_act_N in cell = 176105.9/cell; PDK1_act_N is "PDK1(act~N)";
  species TSC2_phos_U in cell = 17801.445/cell; TSC2_phos_U is "TSC2(phos~U)";
  species mTOR_act_N in cell = 4730.2937/cell; mTOR_act_N is "mTOR(act~N)";
  species Akt_phos_U in cell = 416113.95/cell; Akt_phos_U is "Akt(phos~U)";
  species RPS6K_phos_U in cell = 64813.413/cell; RPS6K_phos_U is "RPS6K(phos~U)";
  species ERK_phos_U in cell = 754596.79/cell; ERK_phos_U is "ERK(phos~U)";
  species S17 in cell = 250.56905/cell; S17 is "IGF1(rec!1).IGF1R(int~N,lig!1,phos~U)";
  species S18 in cell = 3.966988e-26/cell; S18 is "Ins(rec!1).InsR(int~N,lig!1,phos~U)";
  species S19 in cell = 15142.828/cell; S19 is "IGF1(rec!1).IGF1R(int~N,lig!1,phos~P)";
  species S20 in cell = 1.3392476e-18/cell; S20 is "Ins(rec!1).InsR(int~N,lig!1,phos~P)";
  species IRS_inh_N_phos_P in cell = 5574.5077/cell; IRS_inh_N_phos_P is "IRS(inh~N,phos~P)";
  species SOS_act_Y_inh_N in cell = 17983.881/cell; SOS_act_Y_inh_N is "SOS(act~Y,inh~N)";
  species S23 in cell = 9606.6026/cell; S23 is "IGF1(rec!1).IGF1R(int~Y,lig!1,phos~P)";
  species S24 in cell = 6.9626956e-19/cell; S24 is "Ins(rec!1).InsR(int~Y,lig!1,phos~P)";
  species Ras_gtp_Y in cell = 69091.096/cell; Ras_gtp_Y is "Ras(gtp~Y)";
  species PI3K_act_Y in cell = 13597.143/cell; PI3K_act_Y is "PI3K(act~Y)";
  species Raf_inh_N_phos_P in cell = 111742.49/cell; Raf_inh_N_phos_P is "Raf(inh~N,phos~P)";
  species PDK1_act_Y in cell = 9975.1008/cell; PDK1_act_Y is "PDK1(act~Y)";
  species MEK_inh_N_phos_P in cell = 9.8168061/cell; MEK_inh_N_phos_P is "MEK(inh~N,phos~P)";
  species Akt_phos_P in cell = 16793.05/cell; Akt_phos_P is "Akt(phos~P)";
  species ERK_phos_P in cell = 8575.2134/cell; ERK_phos_P is "ERK(phos~P)";
  species TSC2_phos_P in cell = 113537.55/cell; TSC2_phos_P is "TSC2(phos~P)";
  species Raf_inh_Y_phos_U in cell = 8578.7858/cell; Raf_inh_Y_phos_U is "Raf(inh~Y,phos~U)";
  species IRS_inh_Y_phos_U in cell = 87003.493/cell; IRS_inh_Y_phos_U is "IRS(inh~Y,phos~U)";
  species mTOR_act_Y in cell = 78738.706/cell; mTOR_act_Y is "mTOR(act~Y)";
  species SOS_act_N_inh_Y in cell = 72091.118/cell; SOS_act_N_inh_Y is "SOS(act~N,inh~Y)";
  species MEK_inh_Y_phos_U in cell = 1098154.2/cell; MEK_inh_Y_phos_U is "MEK(inh~Y,phos~U)";
  species RPS6K_phos_P in cell = 57164.587/cell; RPS6K_phos_P is "RPS6K(phos~P)";

  // Parameters:
  IGF1_0 = 100000;
  INS_0 = 0;
  IGF1R_0 = 25000;
  INSR_0 = 25000;
  IRS_0 = 92766;
  SOS_0 = 90075;
  RAS_0 = 230642;
  RAF_0 = 126069;
  MEK_0 = 1098164;
  ERK_0 = 763172;
  PI3K_0 = 64009;
  PDK1_0 = 186081;
  AKT_0 = 432907;
  TSC2_0 = 131339;
  MTOR_0 = 83469;
  RPS6K_0 = 121978;
  kf1 = 0.4837;
  kf1b = -2.9153;
  kf1c = 2.9865;
  kf1d = 1.2052;
  kf2 = 4.6312;
  kf2b = -0.8667;
  kf2c = 4.8758;
  kf2d = -2.6526;
  kf3 = -2.7913;
  kf4 = -3.1902;
  kf5 = -0.692;
  kf6 = 4.125;
  kf7 = -3.04;
  kf8 = -4.576;
  kf9 = 0.3532;
  kf10 = 4.3309;
  kf11 = -6.9315;
  kf12 = -3.8016;
  kf13 = -6.2483;
  kf14 = 1;
  kf15 = -6.7787;
  kf16 = -7.7887;
  kf17 = -7.7124;
  kf101 = -0.0831;
  kf102 = -6.4728;
  kf103 = 0.0477;
  kf104 = 3.9039;
  kf105 = 0.7593;
  kf106 = 0.5137;
  kf107 = -0.8678;
  kf108 = -3.3447;
  kf109 = -4.5098;
  kf110 = 6.393;
  kf111 = -2.7962;
  kf112 = -2.8996;
  kf201 = 2.7628;
  kf202 = 4.0772;
  kf203 = -5.4445;
  kf204 = 0.2274;
  kf206 = -6.3512;
  kf207 = -6.3752;
  kf208 = -5.0059;
  kf301 = -3.0943;
  kf302 = -0.9807;
  kf303 = 4.2786;
  kf304 = -5.6559;
  kf401 = -3.1016;
  kf402 = -2.9249;
  kf403 = -3.4193;
  kf404 = -7.0807;
  _rateLaw1 = 10^kf1;
  _rateLaw2 = 10^kf1b;
  _rateLaw3 = 10^kf1c;
  _rateLaw4 = 10^kf1d;
  _rateLaw5 = 10^kf2;
  _rateLaw6 = 10^kf2b;
  _rateLaw7 = 10^kf2c;
  _rateLaw8 = 10^kf2d;
  _rateLaw9 = 10^kf3;
  _rateLaw10 = 10^kf4;
  _rateLaw11 = 10^kf5;
  _rateLaw12 = 10^kf6;
  _rateLaw13 = 10^kf7;
  _rateLaw14 = 10^kf8;
  _rateLaw15 = 10^kf9;
  _rateLaw16 = 10^kf10;
  _rateLaw17 = 10^kf11;
  _rateLaw18 = 10^kf12;
  _rateLaw19 = 10^kf13;
  _rateLaw20 = 10^kf14;
  _rateLaw21 = 10^kf15;
  _rateLaw22 = 10^kf16;
  _rateLaw23 = 10^kf17;
  _rateLaw24 = 10^kf101;
  _rateLaw25 = 10^kf102;
  _rateLaw26 = 10^kf103;
  _rateLaw27 = 10^kf104;
  _rateLaw28 = 10^kf105;
  _rateLaw29 = 10^kf106;
  _rateLaw30 = 10^kf107;
  _rateLaw31 = 10^kf108;
  _rateLaw32 = 10^kf109;
  _rateLaw33 = 10^kf110;
  _rateLaw34 = 10^kf111;
  _rateLaw35 = 10^kf112;
  _rateLaw36 = 10^kf201;
  _rateLaw37 = 10^kf202;
  _rateLaw38 = 10^kf203;
  _rateLaw39 = 10^kf204;
  _rateLaw40 = 10^kf206;
  _rateLaw41 = 10^kf207;
  _rateLaw42 = 10^kf208;
  _rateLaw43 = 10^kf301;
  _rateLaw44 = 10^kf302;
  _rateLaw45 = 10^kf303;
  _rateLaw46 = 10^kf304;
  _rateLaw47 = 10^kf401;
  _rateLaw48 = 10^kf402;
  _rateLaw49 = 10^kf403;
  _rateLaw50 = 10^kf404;

  // Assignment rules:
  pRecTot_free := S19 + S20;
  pAkt308_free := 0 + Akt_phos_P;
  pRPS6K_free := 0 + RPS6K_phos_P;
  pERK_free := 0 + ERK_phos_P;

  // Reactions:
  R1: IGF1_rec + IGF1R_int_N_lig_phos_U => S17; _rateLaw1*IGF1_rec*IGF1R_int_N_lig_phos_U;
  R2: Ins_rec + InsR_int_N_lig_phos_U => S18; _rateLaw5*Ins_rec*InsR_int_N_lig_phos_U;
  R3: S17 => IGF1_rec + IGF1R_int_N_lig_phos_U; _rateLaw2*S17;
  R4: S17 => S19; _rateLaw3*S17;
  R5: S18 => Ins_rec + InsR_int_N_lig_phos_U; _rateLaw6*S18;
  R6: S18 => S20; _rateLaw7*S18;
  R7: S19 => S17; _rateLaw4*S19;
  R8: S20 => S18; _rateLaw8*S20;
  R9: IRS_inh_N_phos_U + S19 => S19 + IRS_inh_N_phos_P; _rateLaw9*IRS_inh_N_phos_U*S19;
  R10: IRS_inh_N_phos_U + S20 => S20 + IRS_inh_N_phos_P; _rateLaw10*IRS_inh_N_phos_U*S20;
  R11: SOS_act_N_inh_N + S19 => S19 + SOS_act_Y_inh_N; _rateLaw11*SOS_act_N_inh_N*S19;
  R12: SOS_act_N_inh_N + S20 => S20 + SOS_act_Y_inh_N; _rateLaw12*SOS_act_N_inh_N*S20;
  R13: S19 => S23; _rateLaw47*S19;
  R14: S20 => S24; _rateLaw49*S20;
  R15: SOS_act_N_inh_N + IRS_inh_N_phos_P => IRS_inh_N_phos_P + SOS_act_Y_inh_N; _rateLaw13*SOS_act_N_inh_N*IRS_inh_N_phos_P;
  R16: Ras_gtp_N + SOS_act_Y_inh_N => SOS_act_Y_inh_N + Ras_gtp_Y; _rateLaw14*Ras_gtp_N*SOS_act_Y_inh_N;
  R17: PI3K_act_N + IRS_inh_N_phos_P => IRS_inh_N_phos_P + PI3K_act_Y; _rateLaw18*PI3K_act_N*IRS_inh_N_phos_P;
  R18: IRS_inh_N_phos_P => IRS_inh_N_phos_U; _rateLaw24*IRS_inh_N_phos_P;
  R19: SOS_act_Y_inh_N => SOS_act_N_inh_N; _rateLaw25*SOS_act_Y_inh_N;
  R20: S23 => IGF1R_int_N_lig_phos_U; _rateLaw48*S23;
  R21: S24 => InsR_int_N_lig_phos_U; _rateLaw50*S24;
  R22: Raf_inh_N_phos_U + Ras_gtp_Y => Ras_gtp_Y + Raf_inh_N_phos_P; _rateLaw15*Raf_inh_N_phos_U*Ras_gtp_Y;
  R23: PDK1_act_N + PI3K_act_Y => PI3K_act_Y + PDK1_act_Y; _rateLaw19*PDK1_act_N*PI3K_act_Y;
  R24: Ras_gtp_Y => Ras_gtp_N; _rateLaw26*Ras_gtp_Y;
  R25: PI3K_act_Y => PI3K_act_N; _rateLaw29*PI3K_act_Y;
  R26: MEK_inh_N_phos_U + Raf_inh_N_phos_P => Raf_inh_N_phos_P + MEK_inh_N_phos_P; _rateLaw16*MEK_inh_N_phos_U*Raf_inh_N_phos_P;
  R27: Akt_phos_U + PDK1_act_Y => PDK1_act_Y + Akt_phos_P; _rateLaw20*Akt_phos_U*PDK1_act_Y;
  R28: Raf_inh_N_phos_P => Raf_inh_N_phos_U; _rateLaw27*Raf_inh_N_phos_P;
  R29: PDK1_act_Y => PDK1_act_N; _rateLaw30*PDK1_act_Y;
  R30: ERK_phos_U + MEK_inh_N_phos_P => MEK_inh_N_phos_P + ERK_phos_P; _rateLaw17*ERK_phos_U*MEK_inh_N_phos_P;
  R31: TSC2_phos_U + Akt_phos_P => Akt_phos_P + TSC2_phos_P; _rateLaw21*TSC2_phos_U*Akt_phos_P;
  R32: MEK_inh_N_phos_P => MEK_inh_N_phos_U; _rateLaw28*MEK_inh_N_phos_P;
  R33: Akt_phos_P => Akt_phos_U; _rateLaw33*Akt_phos_P;
  R34: Raf_inh_N_phos_U + Akt_phos_P => Akt_phos_P + Raf_inh_Y_phos_U; _rateLaw39*Raf_inh_N_phos_U*Akt_phos_P;
  R35: IRS_inh_N_phos_U + Akt_phos_P => Akt_phos_P + IRS_inh_Y_phos_U; _rateLaw42*IRS_inh_N_phos_U*Akt_phos_P;
  R36: mTOR_act_N + TSC2_phos_P => TSC2_phos_P + mTOR_act_Y; _rateLaw22*mTOR_act_N*TSC2_phos_P;
  R37: TSC2_phos_P => TSC2_phos_U; _rateLaw31*TSC2_phos_P;
  R38: ERK_phos_P => ERK_phos_U; _rateLaw35*ERK_phos_P;
  R39: SOS_act_N_inh_N + ERK_phos_P => ERK_phos_P + SOS_act_N_inh_Y; _rateLaw36*SOS_act_N_inh_N*ERK_phos_P;
  R40: MEK_inh_N_phos_U + ERK_phos_P => ERK_phos_P + MEK_inh_Y_phos_U; _rateLaw37*MEK_inh_N_phos_U*ERK_phos_P;
  R41: IRS_inh_N_phos_U + ERK_phos_P => ERK_phos_P + IRS_inh_Y_phos_U; _rateLaw40*IRS_inh_N_phos_U*ERK_phos_P;
  R42: Akt_phos_P + ERK_phos_P => Akt_phos_U + ERK_phos_P; _rateLaw41*Akt_phos_P*ERK_phos_P;
  R43: IRS_inh_Y_phos_U => IRS_inh_N_phos_U; _rateLaw43*IRS_inh_Y_phos_U;
  R44: Raf_inh_Y_phos_U => Raf_inh_N_phos_U; _rateLaw45*Raf_inh_Y_phos_U;
  R45: RPS6K_phos_U + mTOR_act_Y => mTOR_act_Y + RPS6K_phos_P; _rateLaw23*RPS6K_phos_U*mTOR_act_Y;
  R46: mTOR_act_Y => mTOR_act_N; _rateLaw32*mTOR_act_Y;
  R47: SOS_act_N_inh_Y => SOS_act_N_inh_N; _rateLaw44*SOS_act_N_inh_Y;
  R48: MEK_inh_Y_phos_U => MEK_inh_N_phos_U; _rateLaw46*MEK_inh_Y_phos_U;
  R49: RPS6K_phos_P => RPS6K_phos_U; _rateLaw34*RPS6K_phos_P;
  R50: IRS_inh_N_phos_U + RPS6K_phos_P => IRS_inh_Y_phos_U + RPS6K_phos_P; _rateLaw38*IRS_inh_N_phos_U*RPS6K_phos_P;

  // Unit definitions:
  unit substance = item;
end
